// COMSOL Multiphysics 5.0.0.243 model "cell.mph"
// Outline of the model tree

Geometry
  geom1 "Cell" (3D, length unit µm)
    blk1: Block "Bloc 1" | size = {25, 25, 5000}
    cyl1: Cylinder "Wire along x" | pos = {0, 0, 128}; axistype = x; r = 4; h = 25
    cyl2: Cylinder "Wire along y" | pos = {0, 0, 128}; axistype = y; r = 4; h = 25
    cyl3: Cylinder "Wire along x 2" | pos = {0, 25, 128}; axistype = x; r = 4; h = 25
    cyl4: Cylinder "Wire along y 2" | pos = {25, 0, 128}; axistype = y; r = 4; h = 25
    arr1: Array "Wire Mesh" | contributeto = none; input = cyl1, cyl2, cyl3, cyl4; size = {1, 1, 1}
    dif1: Difference "Différence 1"
      input = blk1
      input2 = arr1(1%2C1%2C1%2C1), arr1(1%2C1%2C1%2C2), arr1(1%2C1%2C1%2C3), arr1(1%2C1%2C1%2C4)
    fin: Finalize "Constituer une union"

Materials
  mat1: Common "Air" on all domains
    def "Basique"
      relpermeability = 1
      relpermittivity = 1
      dynamicviscosity = eta(T[1/K])[Pa*s]
      ratioofspecificheat = 1.4
      electricconductivity = 0[S/m]
      heatcapacity = Cp(T[1/K])[J/(kg*K)]
      density = rho(pA[1/Pa],T[1/K])[kg/m^3]
      thermalconductivity = k(T[1/K])[W/(m*K)]
      soundspeed = cs(T[1/K])[m/s]
      eta: Piecewise "Définie par morceaux" | arg = T; extrap = constant; pieces = {200.0, 1600.0, -8.38278E-7+8.35717342E-8*T^1-7.69429583E-11*T^2+4.6437266E-14*T^3-1.06585607E-17*T^4}
      Cp: Piecewise "Définie par morceaux 2" | arg = T; extrap = constant; pieces = {200.0, 1600.0, 1047.63657-0.372589265*T^1+9.45304214E-4*T^2-6.02409443E-7*T^3+1.2858961E-10*T^4}
      rho: Analytic "Analytique" | expr = pA*0.02897/8.314/T; args = {pA, T}; dermethod = manual; argders = {{pA, d(pA*0.02897/8.314/T,pA)}, {T, d(pA*0.02897/8.314/T,T)}}
      k: Piecewise "Définie par morceaux 3" | arg = T; extrap = constant; pieces = {200.0, 1600.0, -0.00227583562+1.15480022E-4*T^1-7.90252856E-8*T^2+4.11702505E-11*T^3-7.43864331E-15*T^4}
      cs: Analytic "Analytique 2" | expr = sqrt(1.4*287*T); args = T; dermethod = manual; argders = {T, d(sqrt(1.4*287*T),T)}
    RefractiveIndex "Indice de réfraction"
      n = 1
      ki = 0

Physics
  es: Electrostatics "Study" on all domains
    dependent variable V
    ccn1: ChargeConservation "Conservation de la charge 1" (default)
    zc1: ZeroCharge "Charge nulle 1" (default)
    init1: init "Valeurs initiales 1" (default)
    gnd1: Ground "Vpad" on boundaries 3
    pot1: ElectricPotential "Vmesh" on selection geom1_arr1_bnd | V0 = -440
    pot2: ElectricPotential "Vdrift" on boundaries 10 | V0 = -640
  es2: Electrostatics "WF wire" on all domains
    dependent variable V2
    EquationForm.form = Stationary
    MeshControl.EnableMeshControl = 1
    ccn1: ChargeConservation "Conservation de la charge 1" (default)
    zc1: ZeroCharge "Charge nulle 1" (default)
    init1: init "Valeurs initiales 1" (default)
    gnd1: Ground "Vpad" on boundaries 3
    pot1: ElectricPotential "Vmesh" on selection geom1_arr1_bnd | V0 = 1
    pot2: ElectricPotential "Vdrift" on boundaries 10 | V0 = 0
  es3: Electrostatics "WF drift" on all domains
    dependent variable V3
    ccn1: ChargeConservation "Conservation de la charge 1" (default)
    zc1: ZeroCharge "Charge nulle 1" (default)
    init1: init "Valeurs initiales 1" (default)
    gnd1: Ground "Vpad" on boundaries 3
    gnd2: Ground "Vmesh" on selection geom1_arr1_bnd
    pot1: ElectricPotential "Vdrift" on boundaries 10 | V0 = 1

Mesh
  mesh1 "Maillage 1" (physics-controlled)
    size: MeshSizeDefault "Taille" | hauto = 1

Studies
  std1 "Etude 1"
    stat: Stationary "Stationnaire"

Solver configurations
  sol1 "Solution 1" (study std1)
    v1: Variables "Variables dépendantes 1"
    s1: Stationary "Solveur stationnaire 1"
      se1: Segregated "Ségrégé 1"
        ss1: SegregatedStep "Etape ségrégée 1" | segvar = {comp1_V}; linsolver = i1
        ss2: SegregatedStep "Etape ségrégée 2" | segvar = {comp1_V2}; linsolver = i2
        ss3: SegregatedStep "Etape ségrégée 3" | segvar = {comp1_V3}; linsolver = i3
      i1: Iterative "Itératif 1" | linsolver = cg
        mg1: Multigrid "Multigrilles 1" | prefun = amg
      i2: Iterative "Itératif 2" | linsolver = cg
        mg1: Multigrid "Multigrilles 1" | prefun = amg
      i3: Iterative "Itératif 3" | linsolver = cg
        mg1: Multigrid "Multigrilles 1" | prefun = amg

Datasets
  dset1: Solution | solution = sol1

Plots
  pg1: PlotGroup3D "Potentiel électrique (es)" | data = dset1
    mslc1: Multislice "Multicoupes 1" | expr = V
  pg2: PlotGroup3D "Potentiel électrique (es2)" | data = dset1
    mslc1: Multislice "Multicoupes 1" | expr = V2
  pg3: PlotGroup3D "Potentiel électrique (es3)" | data = dset1
    mslc1: Multislice "Multicoupes 1" | expr = V3

Exports
  mesh1: Mesh "Maillage 1"
    data = dset1
    type3D = mphascii
    filename = /Users/aglaenzer/products/garfield/install/COMSOL/COMSOL_data/model2/mesh.mphtxt
  data1: Data "Données 1"
    data = dset1
    expr = {V, V2, V3}
    descr = {Potentiel électrique, Potentiel électrique, Potentiel électrique}
    filename = /Users/aglaenzer/products/garfield/install/COMSOL/COMSOL_data/model2/ewfield_440V.txt
    lagorder = 2